*HEADING
HASH: JZ7AQJPN, DATE: 12/21/2025, UNIT SYSTEM: MM_TON_S_C
*NODE
1, 0.00000000E+000, 0.00000000E+000, 1.00000000E+000
2, 0.00000000E+000, 1.00000000E+001, 1.00000000E+000
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*ELEMENT, TYPE=C3D20, ELSET=SOLID_PART-1
1, 1, 9, 237, 47, 117, 722, 1419, 759, 18, 391, 390, 64, 732, 1573, 1574, 776, 118, 731, 1572, 777
2, 117, 722, 1419, 759, 5, 123, 934, 145, 732, 1573, 1574, 776, 132, 1087, 1088, 162, 119, 733, 1575, 778
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*ELEMENT, TYPE=S8, ELSET=SHELL_PART-1
361, 2210, 2214, 2570, 2489, 2223, 3281, 3282, 2569
362, 2489, 2570, 2571, 2488, 3282, 3283, 3284, 2568
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*NSET, NSET=INTERNAL_SELECTION-1_DISPLACEMENT_ROTATION-1
1, 2, 5, 6, 9, 10
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*NSET, NSET=INTERNAL-1_INTERNAL_SELECTION-1_SURFACE_TRACTION-1
2212, 2213, 2392, 2393, 2394, 2395
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*NSET, NSET=INTERNAL-1_INTERNAL_SELECTION-1_CONTACT_PAIR-1_MASTER
3, 4, 7, 8, 28, 29
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*NSET, NSET=INTERNAL-1_INTERNAL_SELECTION-1_CONTACT_PAIR-1_SLAVE
2210, 2211, 2214, 2215, 2216, 2217
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*ELSET, ELSET=INTERNAL_SELECTION-1_SOLID_SECTION-1
SOLID_PART-1
*ELSET, ELSET=INTERNAL_SELECTION-1_SHELL_SECTION-1
361, 362, 363, 364, 365, 366
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*ELSET, ELSET=INTERNAL-1_INTERNAL_SELECTION-1_SURFACE_TRACTION-1_S5
440, 520, 600, 680, 760, 840, 920, 1000, 1080, 1160
*ELSET, ELSET=INTERNAL-1_INTERNAL_SELECTION-1_CONTACT_PAIR-1_MASTER_S5
35, 36, 71, 72, 107, 108
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*ELSET, ELSET=INTERNAL-1_INTERNAL_SELECTION-1_CONTACT_PAIR-1_SLAVE_S3
361, 441, 521, 601, 681, 761, 841, 921, 1001, 1081
*SURFACE, NAME=INTERNAL_SELECTION-1_SURFACE_TRACTION-1, TYPE=ELEMENT
INTERNAL-1_INTERNAL_SELECTION-1_SURFACE_TRACTION-1_S5, S5
*SURFACE, NAME=INTERNAL_SELECTION-1_CONTACT_PAIR-1_MASTER, TYPE=ELEMENT
INTERNAL-1_INTERNAL_SELECTION-1_CONTACT_PAIR-1_MASTER_S5, S5
*SURFACE, NAME=INTERNAL_SELECTION-1_CONTACT_PAIR-1_SLAVE, TYPE=ELEMENT
INTERNAL-1_INTERNAL_SELECTION-1_CONTACT_PAIR-1_SLAVE_S3, S3
*MATERIAL, NAME=S235
*DENSITY
7.8E-09
*ELASTIC
210000, 0.28
*EXPANSION, ZERO=20
1.1E-05
*CONDUCTIVITY
14
*SPECIFIC HEAT
440000000
*SOLID SECTION, ELSET=INTERNAL_SELECTION-1_SOLID_SECTION-1, MATERIAL=S235
*SHELL SECTION, ELSET=INTERNAL_SELECTION-1_SHELL_SECTION-1, MATERIAL=S235, OFFSET=0
2
*SURFACE INTERACTION, NAME=SURFACE_INTERACTION-1
*SURFACE BEHAVIOR, PRESSURE-OVERCLOSURE=TIED
10000000
*FRICTION
0.1
*CONTACT PAIR, INTERACTION=SURFACE_INTERACTION-1, TYPE=SURFACE TO SURFACE, ADJUST=0
INTERNAL_SELECTION-1_CONTACT_PAIR-1_SLAVE, INTERNAL_SELECTION-1_CONTACT_PAIR-1_MASTER
*AMPLITUDE, NAME=TEST_TABULAR
0, 0
*STEP, NLGEOM
*STATIC, SOLVER=PARDISO
*BOUNDARY, OP=NEW
*BOUNDARY
INTERNAL_SELECTION-1_DISPLACEMENT_ROTATION-1, 1, 1, 0
INTERNAL_SELECTION-1_DISPLACEMENT_ROTATION-1, 2, 2, 0
INTERNAL_SELECTION-1_DISPLACEMENT_ROTATION-1, 3, 3, 0
*CLOAD, OP=NEW
*DLOAD, OP=NEW
*CLOAD
2400, 3, -3.33333333E-001
2213, 3, -1.66666667E-001
2410, 3, -6.66666667E-001
2399, 3, -3.33333333E-001
2409, 3, -6.66666667E-001
2398, 3, -3.33333333E-001
2408, 3, -6.66666667E-001
2397, 3, -3.33333333E-001
2407, 3, -6.66666667E-001
2396, 3, -3.33333333E-001
2406, 3, -6.66666667E-001
2395, 3, -3.33333333E-001
2405, 3, -6.66666667E-001
2394, 3, -3.33333333E-001
2404, 3, -6.66666667E-001
2393, 3, -3.33333333E-001
2403, 3, -6.66666667E-001
2392, 3, -3.33333333E-001
2402, 3, -6.66666667E-001
2212, 3, -1.66666667E-001
2401, 3, -6.66666667E-001
*NODE FILE
RF, U
*EL FILE, OUTPUT=3D
S, E, NOE
*END STEP
*STEP, NLGEOM
*STATIC, SOLVER=PARDISO
*BOUNDARY, OP=NEW
*BOUNDARY
INTERNAL_SELECTION-1_DISPLACEMENT_ROTATION-1, 1, 1, 0
INTERNAL_SELECTION-1_DISPLACEMENT_ROTATION-1, 2, 2, 0
INTERNAL_SELECTION-1_DISPLACEMENT_ROTATION-1, 3, 3, 0
*CLOAD, OP=NEW
*DLOAD, OP=NEW
*CLOAD
2400, 3, -3.33333333E-001
2213, 3, -1.66666667E-001
2410, 3, -6.66666667E-001
2399, 3, -3.33333333E-001
2409, 3, -6.66666667E-001
2398, 3, -3.33333333E-001
2408, 3, -6.66666667E-001
2397, 3, -3.33333333E-001
2407, 3, -6.66666667E-001
2396, 3, -3.33333333E-001
2406, 3, -6.66666667E-001
2395, 3, -3.33333333E-001
2405, 3, -6.66666667E-001
2394, 3, -3.33333333E-001
2404, 3, -6.66666667E-001
2393, 3, -3.33333333E-001
2403, 3, -6.66666667E-001
2392, 3, -3.33333333E-001
2402, 3, -6.66666667E-001
2212, 3, -1.66666667E-001
2401, 3, -6.66666667E-001
*NODE FILE
RF, U
*EL FILE, OUTPUT=3D
S, E, NOE
*END STEP
*STEP, NLGEOM
*STATIC, SOLVER=PARDISO
*BOUNDARY, OP=NEW
*BOUNDARY
INTERNAL_SELECTION-1_DISPLACEMENT_ROTATION-1, 1, 1, 0
INTERNAL_SELECTION-1_DISPLACEMENT_ROTATION-1, 2, 2, 0
INTERNAL_SELECTION-1_DISPLACEMENT_ROTATION-1, 3, 3, 0
*CLOAD, OP=NEW
*DLOAD, OP=NEW
*CLOAD
2400, 3, -3.33333333E-001
2213, 3, -1.66666667E-001
2410, 3, -6.66666667E-001
2399, 3, -3.33333333E-001
2409, 3, -6.66666667E-001
2398, 3, -3.33333333E-001
2408, 3, -6.66666667E-001
2397, 3, -3.33333333E-001
2407, 3, -6.66666667E-001
2396, 3, -3.33333333E-001
2406, 3, -6.66666667E-001
2395, 3, -3.33333333E-001
2405, 3, -6.66666667E-001
2394, 3, -3.33333333E-001
2404, 3, -6.66666667E-001
2393, 3, -3.33333333E-001
2403, 3, -6.66666667E-001
2392, 3, -3.33333333E-001
2402, 3, -6.66666667E-001
2212, 3, -1.66666667E-001
2401, 3, -6.66666667E-001
*NODE FILE
RF, U
*EL FILE, OUTPUT=3D
S, E, NOE
*END STEP
