**
** Heading +++++++++++++++++++++++++++++++++++++++++++++++++
**
*Heading
Hash: Jz7aQjPn, Date: 04/28/2026, Unit system: MM_TON_S_C
**
** Nodes +++++++++++++++++++++++++++++++++++++++++++++++++++
**
*Node
2210, 2.00000000E+001, 1.00000000E+001, 0.00000000E+000
2211, 2.00000000E+001, 0.00000000E+000, 0.00000000E+000
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**
** Elements ++++++++++++++++++++++++++++++++++++++++++++++++
**
*Element, Type=S8, Elset=Shell_part-1
361, 2210, 2214, 2570, 2489, 2223, 3281, 3282, 2569
362, 2489, 2570, 2571, 2488, 3282, 3283, 3284, 2568
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**
** Node sets +++++++++++++++++++++++++++++++++++++++++++++++
**
*Nset, Nset=Internal_Selection-1_NODE_SELECTION-1
2396
*Nset, Nset=Internal-1_Internal_Selection-1_Surface_Traction-1
2212, 2213, 2392, 2393, 2394, 2395
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*Nset, Nset=Internal_Selection-1_Displacement_Rotation-1
2210, 2211, 2214, 2215, 2216, 2217
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**
** Element sets ++++++++++++++++++++++++++++++++++++++++++++
**
*Elset, Elset=Internal-1_Internal_Selection-1_Surface_Traction-1_S5
440, 520, 600, 680, 760, 840, 920, 1000, 1080, 1160
*Elset, Elset=Internal_Selection-1_Shell_Section-1
361, 362, 363, 364, 365, 366
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**
** Surfaces ++++++++++++++++++++++++++++++++++++++++++++++++
**
*Surface, Name=Internal_Selection-1_Surface_Traction-1, Type=Element
Internal-1_Internal_Selection-1_Surface_Traction-1_S5, S5
**
** Physical constants ++++++++++++++++++++++++++++++++++++++
**
**
** Coordinate systems ++++++++++++++++++++++++++++++++++++++
**
**
** Materials +++++++++++++++++++++++++++++++++++++++++++++++
**
*Material, Name=S235
*Density
7.8E-09
*Elastic
210000, 0.28
*Expansion, Zero=20
1.1E-05
*Conductivity
14
*Specific heat
440000000
**
** Sections ++++++++++++++++++++++++++++++++++++++++++++++++
**
*Shell section, Elset=Internal_Selection-1_Shell_Section-1, Material=S235, Offset=0
1.5
**
** Pre-tension sections ++++++++++++++++++++++++++++++++++++
**
**
** Constraints +++++++++++++++++++++++++++++++++++++++++++++
**
**
** Surface interactions ++++++++++++++++++++++++++++++++++++
**
*Surface interaction, Name=Surface_Interaction-1
*Surface behavior, Pressure-overclosure=Tied
10000000
*Friction
0.1
**
** Contact pairs +++++++++++++++++++++++++++++++++++++++++++
**
**
** Amplitudes ++++++++++++++++++++++++++++++++++++++++++++++
**
*Amplitude, Name=TEST_TABULAR
0, 0
**
** Initial conditions ++++++++++++++++++++++++++++++++++++++
**
**
** Steps +++++++++++++++++++++++++++++++++++++++++++++++++++
**
**
** Step-1 ++++++++++++++++++++++++++++++++++++++++++++++++++
**
*Step, Nlgeom
*Static, Solver=Pardiso
**
** Controls ++++++++++++++++++++++++++++++++++++++++++++++++
**
**
** Output frequency ++++++++++++++++++++++++++++++++++++++++
**
**
** Boundary conditions +++++++++++++++++++++++++++++++++++++
**
*Boundary, op=New
** Name: Displacement_Rotation-1
*Boundary
Internal_Selection-1_Displacement_Rotation-1, 1, 1, 0
Internal_Selection-1_Displacement_Rotation-1, 2, 2, 0
Internal_Selection-1_Displacement_Rotation-1, 3, 3, 0
Internal_Selection-1_Displacement_Rotation-1, 4, 4, 0
Internal_Selection-1_Displacement_Rotation-1, 5, 5, 0
Internal_Selection-1_Displacement_Rotation-1, 6, 6, 0
**
** Loads +++++++++++++++++++++++++++++++++++++++++++++++++++
**
*Cload, op=New
*Dload, op=New
** Name: Surface_Traction-1
*Cload
2400, 3, -3.33333333E-001
2213, 3, -1.66666667E-001
2410, 3, -6.66666667E-001
2399, 3, -3.33333333E-001
2409, 3, -6.66666667E-001
2398, 3, -3.33333333E-001
2408, 3, -6.66666667E-001
2397, 3, -3.33333333E-001
2407, 3, -6.66666667E-001
2396, 3, -3.33333333E-001
2406, 3, -6.66666667E-001
2395, 3, -3.33333333E-001
2405, 3, -6.66666667E-001
2394, 3, -3.33333333E-001
2404, 3, -6.66666667E-001
2393, 3, -3.33333333E-001
2403, 3, -6.66666667E-001
2392, 3, -3.33333333E-001
2402, 3, -6.66666667E-001
2212, 3, -1.66666667E-001
2401, 3, -6.66666667E-001
**
** Defined fields ++++++++++++++++++++++++++++++++++++++++++
**
**
** History outputs +++++++++++++++++++++++++++++++++++++++++
**
*Node print, Nset=Internal_Selection-1_NODE_SELECTION-1, Global=Yes
U
**
** Field outputs +++++++++++++++++++++++++++++++++++++++++++
**
*Node file
RF, U
*El file, Output=3D
S, E, NOE
**
** End step ++++++++++++++++++++++++++++++++++++++++++++++++
**
*End step
