**
** Heading +++++++++++++++++++++++++++++++++++++++++++++++++
**
*Heading
Hash: 6a50aOWV, Date: 01/09/2026, Unit system: MM_TON_S_C
**
** Nodes +++++++++++++++++++++++++++++++++++++++++++++++++++
**
*Node
1, 2.60000000E-015, -5.28964966E+001, -4.34256645E+000
2, 2.80000000E-015, -5.49579522E+001, -2.85865231E+000
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**
** Elements ++++++++++++++++++++++++++++++++++++++++++++++++
**
*Element, Type=C3D4, Elset=Solid_part-1
1, 3229, 3140, 497, 3271
2, 2119, 3232, 2064, 2141
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**
** Node sets +++++++++++++++++++++++++++++++++++++++++++++++
**
*Nset, Nset=Bolt-1
33, 34, 35, 36, 530, 531
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*Nset, Nset=Bolt-2
29, 30, 31, 32, 514, 515
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*Nset, Nset=Bolt-3
25, 26, 27, 28, 498, 499
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*Nset, Nset=Load
17, 18, 19, 20, 21, 22
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*Nset, Nset=Internal_Selection-1_Fixed-1
25, 26, 27, 28, 29, 30
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*Nset, Nset=Internal-1_Internal_Selection-1_Surface_Traction-1
17, 18, 19, 20, 422, 423
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**
** Element sets ++++++++++++++++++++++++++++++++++++++++++++
**
*Elset, Elset=Internal-1_Internal_Selection-1_Surface_Traction-1_S3
13, 56, 222, 250, 311, 949
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*Elset, Elset=Internal-1_Internal_Selection-1_Surface_Traction-1_S2
65, 290, 1443, 1596, 1889, 2141
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*Elset, Elset=Internal-1_Internal_Selection-1_Surface_Traction-1_S4
787, 1218, 2888, 2985, 3408, 4383
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*Elset, Elset=Internal-1_Internal_Selection-1_Surface_Traction-1_S1
1002, 1397, 3169, 3787, 4116, 4360
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*Elset, Elset=Internal_Selection-1_Solid_Section-1
Solid_part-1
**
** Surfaces ++++++++++++++++++++++++++++++++++++++++++++++++
**
*Surface, Name=Internal_Selection-1_Surface_Traction-1, Type=Element
Internal-1_Internal_Selection-1_Surface_Traction-1_S3, S3
Internal-1_Internal_Selection-1_Surface_Traction-1_S2, S2
Internal-1_Internal_Selection-1_Surface_Traction-1_S4, S4
Internal-1_Internal_Selection-1_Surface_Traction-1_S1, S1
**
** Physical constants ++++++++++++++++++++++++++++++++++++++
**
**
** Coordinate systems ++++++++++++++++++++++++++++++++++++++
**
**
** Materials +++++++++++++++++++++++++++++++++++++++++++++++
**
*Material, Name=S235
*Density
7.8E-09
*Elastic
210000, 0.28
*Expansion, Zero=20
1.1E-05
*Conductivity
14
*Specific heat
440000000
**
** Sections ++++++++++++++++++++++++++++++++++++++++++++++++
**
*Solid section, Elset=Internal_Selection-1_Solid_Section-1, Material=S235
**
** Pre-tension sections ++++++++++++++++++++++++++++++++++++
**
**
** Constraints +++++++++++++++++++++++++++++++++++++++++++++
**
**
** Surface interactions ++++++++++++++++++++++++++++++++++++
**
**
** Contact pairs +++++++++++++++++++++++++++++++++++++++++++
**
**
** Amplitudes ++++++++++++++++++++++++++++++++++++++++++++++
**
**
** Initial conditions ++++++++++++++++++++++++++++++++++++++
**
**
** Steps +++++++++++++++++++++++++++++++++++++++++++++++++++
**
**
** Step-1 ++++++++++++++++++++++++++++++++++++++++++++++++++
**
*Step
*Static, Solver=Spooles
**
** Controls ++++++++++++++++++++++++++++++++++++++++++++++++
**
**
** Output frequency ++++++++++++++++++++++++++++++++++++++++
**
**
** Boundary conditions +++++++++++++++++++++++++++++++++++++
**
*Boundary, op=New
** Name: Fixed-1
*Boundary
Internal_Selection-1_Fixed-1, 1, 6, 0
**
** Loads +++++++++++++++++++++++++++++++++++++++++++++++++++
**
*Cload, op=New
*Dload, op=New
** Name: Surface_Traction-1
*Cload
423, 3, 7.06712752E-001
424, 3, 4.42120712E-001
1202, 3, 7.87714109E-001
3182, 3, 1.30055445635847
1191, 3, 7.28376225E-001
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455, 3, 8.16224692E-001
**
** Defined fields ++++++++++++++++++++++++++++++++++++++++++
**
**
** History outputs +++++++++++++++++++++++++++++++++++++++++
**
**
** Field outputs +++++++++++++++++++++++++++++++++++++++++++
**
*Node print, nset=Load
U
*Node file
RF, U
*El file
S, E, NOE
**
** End step ++++++++++++++++++++++++++++++++++++++++++++++++
**
*End step
**
** Step-2 ++++++++++++++++++++++++++++++++++++++++++++++++++
**
*Step
*Static, Solver=SPOOLES
**
** Controls ++++++++++++++++++++++++++++++++++++++++++++++++
**
**
** Output frequency ++++++++++++++++++++++++++++++++++++++++
**
**
** Boundary conditions +++++++++++++++++++++++++++++++++++++
**
*Boundary, op=New
** Name: Fixed-1
*Boundary
Internal_Selection-1_Fixed-1, 1, 6, 0
**
** Loads +++++++++++++++++++++++++++++++++++++++++++++++++++
**
*Cload, op=New
*Dload, op=New
** Name: Surface_Traction-1
*Cload
423, 1, 7.06712752E-001
423, 3, 7.06712752E-001
424, 1, 4.42120712E-001
424, 3, 4.42120712E-001
1202, 1, 7.87714109E-001
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436, 1, 0.55972820080348
*Node print, nset=Load
U
436, 3, 0.55972820080348
429, 1, 4.63916918E-001
429, 3, 4.63916918E-001
1209, 1, 8.27111901E-001
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455, 3, 8.16224692E-001
**
** Defined fields ++++++++++++++++++++++++++++++++++++++++++
**
**
** History outputs +++++++++++++++++++++++++++++++++++++++++
**
**
** Field outputs +++++++++++++++++++++++++++++++++++++++++++
**
*Node file
RF, U
*El file
S, E, NOE
**
** End step ++++++++++++++++++++++++++++++++++++++++++++++++
**
*End step
